X-UAV Mini Talon (tools/gen_plane.py ile uretildi)
0.0
0 0 0.0
0.3380 0.2621 1.3000
0.3263 0.0 0.0
0.0300
#============================================================
SURFACE
Kanat
10 1.0 48 1.0
SECTION
0.2950 -0.6500 0.0797 0.2200 1.000
NACA
2412
SECTION
0.2928 -0.6175 0.0786 0.2240 1.050
NACA
2412
CONTROL
ail_l 1.0 0.750 0. 0. 0. 1
SECTION
0.2725 -0.3250 0.0683 0.2600 1.500
NACA
2412
CONTROL
ail_l 1.0 0.750 0. 0. 0. 1
SECTION
0.2500 0.0000 0.0570 0.3000 2.000
NACA
2412
SECTION
0.2725 0.3250 0.0683 0.2600 1.500
NACA
2412
CONTROL
ail_r 1.0 0.750 0. 0. 0. 1
SECTION
0.2928 0.6175 0.0786 0.2240 1.050
NACA
2412
CONTROL
ail_r 1.0 0.750 0. 0. 0. 1
SECTION
0.2950 0.6500 0.0797 0.2200 1.000
NACA
2412
#============================================================
SURFACE
V-Kuyruk
10 1.0 16 1.0
SECTION
0.6900 -0.1877 0.1754 0.1000 -3.873
NACA
0010
CONTROL
rv_l 1.0 0.650 0. 0. 0. 1
SECTION
0.6500 0.0000 0.0340 0.1500 -3.873
NACA
0010
CONTROL
rv_l 1.0 0.650 0. 0. 0. 1
CONTROL
rv_r 1.0 0.650 0. 0. 0. 1
SECTION
0.6900 0.1877 0.1754 0.1000 -3.873
NACA
0010
CONTROL
rv_r 1.0 0.650 0. 0. 0. 1
