Skywalker 1900 (tools/gen_plane.py ile uretildi)
0.0
0 0 0.0
0.4465 0.2367 1.9000
0.4007 0.0 0.0
0.0300
#============================================================
SURFACE
Kanat
10 1.0 48 1.0
SECTION
0.3400 -0.9500 0.1148 0.2000 1.000
NACA
2412
SECTION
0.3368 -0.8740 0.1108 0.2056 1.080
NACA
2412
CONTROL
ail_l 1.0 0.750 0. 0. 0. 1
SECTION
0.3180 -0.4275 0.0874 0.2385 1.550
NACA
2412
CONTROL
ail_l 1.0 0.750 0. 0. 0. 1
SECTION
0.3000 0.0000 0.0650 0.2700 2.000
NACA
2412
SECTION
0.3180 0.4275 0.0874 0.2385 1.550
NACA
2412
CONTROL
ail_r 1.0 0.750 0. 0. 0. 1
SECTION
0.3368 0.8740 0.1108 0.2056 1.080
NACA
2412
CONTROL
ail_r 1.0 0.750 0. 0. 0. 1
SECTION
0.3400 0.9500 0.1148 0.2000 1.000
NACA
2412
#============================================================
SURFACE
Yatay Kuyruk
10 1.0 16 1.0
SECTION
1.0500 -0.2500 0.2350 0.1000 -0.060
NACA
0009
CONTROL
elevator 1.0 0.650 0. 0. 0. 1
SECTION
1.0200 0.0000 0.2350 0.1400 -0.060
NACA
0009
CONTROL
elevator 1.0 0.650 0. 0. 0. 1
SECTION
1.0500 0.2500 0.2350 0.1000 -0.060
NACA
0009
CONTROL
elevator 1.0 0.650 0. 0. 0. 1
#============================================================
SURFACE
Dikey Kuyruk
10 1.0 8 1.0
SECTION
0.9700 0.0000 0.0300 0.1800 0.000
NACA
0009
CONTROL
rudder 1.0 0.650 0. 0. 0. 1
SECTION
1.0200 0.0000 0.2400 0.1300 0.000
NACA
0009
CONTROL
rudder 1.0 0.650 0. 0. 0. 1
