Skywalker X8 (tools/gen_plane.py ile uretildi)
0.0
0 0 0.0
0.8056 0.4084 2.1200
0.4429 0.0 0.0
0.0220
#============================================================
SURFACE
Kanat
10 1.0 48 1.0
SECTION
0.6500 -1.0600 0.0000 0.2000 0.298
NACA
0012
SECTION
0.6250 -1.0070 0.0000 0.2180 0.508
NACA
0012
CONTROL
el_l 1.0 0.780 0. 0. 0. 1
SECTION
0.2750 -0.2650 0.0000 0.4700 3.449
NACA
0012
CONTROL
el_l 1.0 0.780 0. 0. 0. 1
SECTION
0.1500 0.0000 0.0000 0.5600 4.500
NACA
0012
SECTION
0.2750 0.2650 0.0000 0.4700 3.449
NACA
0012
CONTROL
el_r 1.0 0.780 0. 0. 0. 1
SECTION
0.6250 1.0070 0.0000 0.2180 0.508
NACA
0012
CONTROL
el_r 1.0 0.780 0. 0. 0. 1
SECTION
0.6500 1.0600 0.0000 0.2000 0.298
NACA
0012
#============================================================
SURFACE
WingletL
10 1.0 8 1.0
SECTION
0.6500 -1.0600 0.0000 0.2000 0.000
NACA
0008
SECTION
0.7300 -1.0600 0.2000 0.1000 0.000
NACA
0008
#============================================================
SURFACE
WingletR
10 1.0 8 1.0
SECTION
0.6500 1.0600 0.0000 0.2000 0.000
NACA
0008
SECTION
0.7300 1.0600 0.2000 0.1000 0.000
NACA
0008
